from __future__ import annotations

from typing import Any, Dict, List, Optional, Tuple

import json
import os
import re
import types

import Sofa.Core
from . import factory_utils


_AUTO_IMPORTED_PLUGINS = False
_MIN_COMPONENT_REGISTRY_SIZE = 50

_RENAMES_PATH = os.path.join(os.path.dirname(os.path.abspath(__file__)), "renames.json")
_RENAMES_CACHE: Optional[Dict[str, List[str]]] = None


def _load_renames() -> Dict[str, List[str]]:
    """Load the retired→modern class map from `renames.json`.

    Cached after first load. Entries starting with `_` (e.g. `_comment`) are
    skipped so the file can carry documentation alongside data.
    """
    global _RENAMES_CACHE
    if _RENAMES_CACHE is not None:
        return _RENAMES_CACHE
    out: Dict[str, List[str]] = {}
    try:
        with open(_RENAMES_PATH, "r", encoding="utf-8") as f:
            raw = json.load(f)
        for k, v in raw.items():
            if k.startswith("_"):
                continue
            if isinstance(v, list):
                out[k] = [str(x) for x in v]
            elif isinstance(v, str):
                out[k] = [v]
    except (IOError, json.JSONDecodeError):
        pass
    _RENAMES_CACHE = out
    return out


_REPLACEMENT_BULLET_RE = re.compile(r"^\s*[-*]\s*([A-Z][A-Za-z0-9_]*)\b")


def _parse_replacements_from_error(err_text: str) -> List[str]:
    """Extract suggested replacements from a SOFA retired-component error.

    SOFA emits messages like:

        GenericConstraintSolver has been replaced since v25.12 by ...
          - BlockGaussSeidelConstraintSolver (...)
          - UnbuiltGaussSeidelConstraintSolver (...)
          - NNCGConstraintSolver (...)

    We pull the bulleted class names. Caller decides what to do with them."""
    if not err_text or "replaced" not in err_text.lower():
        return []
    seen: List[str] = []
    for line in err_text.splitlines():
        m = _REPLACEMENT_BULLET_RE.match(line)
        if m:
            cand = m.group(1)
            if cand not in seen:
                seen.append(cand)
    return seen


# BaseObject Data fields present on every component — constant noise. Stripped
# from `data_fields` by default; `include_universal=True` keeps them.
_UNIVERSAL_DATA_FIELDS = frozenset(
    {"name", "printLog", "tags", "bbox", "componentState", "listening"}
)

# Template family → (mstate template, 4-point position array). 4 points keep the
# tet/tri topology indices [0..3] valid. We never call init(), so the topology is
# only there so topology-dependent components can construct.
_SCAFFOLD_POSITIONS = {
    "Vec1d": [[0.0], [1.0], [2.0], [3.0]],
    "Vec2d": [[0.0, 0.0], [1.0, 0.0], [0.0, 1.0], [1.0, 1.0]],
    "Vec3d": [[0.0, 0.0, 0.0], [1.0, 0.0, 0.0], [0.0, 1.0, 0.0], [0.0, 0.0, 1.0]],
    "Vec6d": [[0.0, 0.0, 0.0, 0.0, 0.0, 0.0], [1.0, 0.0, 0.0, 0.0, 0.0, 0.0],
              [0.0, 1.0, 0.0, 0.0, 0.0, 0.0], [0.0, 0.0, 1.0, 0.0, 0.0, 0.0]],
    "Rigid3d": [[0.0, 0.0, 0.0, 0.0, 0.0, 0.0, 1.0], [1.0, 0.0, 0.0, 0.0, 0.0, 0.0, 1.0],
                [0.0, 1.0, 0.0, 0.0, 0.0, 0.0, 1.0], [0.0, 0.0, 1.0, 0.0, 0.0, 0.0, 1.0]],
    "Rigid2d": [[0.0, 0.0, 0.0], [1.0, 0.0, 0.0], [0.0, 1.0, 0.0], [0.0, 0.0, 1.0]],
}


def _scaffold_template_for(template: Optional[str]) -> str:
    """Map a requested SOFA template to the scaffold mstate template key.

    Handles exact keys (`Vec3d`), the missing-`d` form (`Vec3`, `Rigid3`), and
    falls back to `Vec3d` for anything unrecognized (bare `Rigid` → `Rigid3d`)."""
    if not template:
        return "Vec3d"
    t = str(template)
    for key in _SCAFFOLD_POSITIONS:
        if t == key or t == key[:-1]:  # "Rigid3" matches "Rigid3d"
            return key
    if t.startswith("Rigid2"):
        return "Rigid2d"
    if t.startswith("Rigid"):
        return "Rigid3d"
    return "Vec3d"


def _build_scaffold(root: Any, template: Optional[str]) -> None:
    """Add a template-matched MechanicalObject + tet/tri topology to `root`.

    The mstate template is chosen so per-template Data shapes come out correct
    (a Vec3d mstate silently degrades a Rigid3d request). The dual topology
    triggers a benign 'one Topology per Node' warning — harmless because we
    never call init()."""
    key = _scaffold_template_for(template)
    root.addObject("MechanicalObject", template=key, name="dummy_mstate",
                   position=_SCAFFOLD_POSITIONS[key])
    root.addObject("TetrahedronSetTopologyContainer", name="dummy_tet_topology",
                   tetrahedra=[[0, 1, 2, 3]])
    root.addObject("TriangleSetTopologyContainer", name="dummy_tri_topology",
                   triangles=[[0, 1, 2], [0, 2, 3], [0, 3, 1], [1, 3, 2]])


def _get_class_entry_metadata(component_name: str) -> Optional[Dict[str, Any]]:
    """Read instantiation-independent metadata from the ObjectFactory ClassEntry.

    Loads the registering plugin first (ClassEntry.templates only populates after
    load). Returns a dict whose fields may be empty/None for an unknown class (the
    factory returns an empty ClassEntry rather than raising). Returns None only on
    an unexpected error. The `isinstance` guards keep mocked unit tests (where
    `Sofa.Core` is a MagicMock) from leaking MagicMock repr strings into the
    scalar fields — under a mock the set/list fields iterate empty and the scalar
    fields fall back to None."""
    try:
        from . import plugin_cache
        plugin = None
        try:
            plugin = plugin_cache.load_plugin_map().get(component_name)
        except Exception:
            plugin = None
        if plugin:
            try:
                import SofaRuntime
                SofaRuntime.importPlugin(plugin)
            except Exception:
                pass
        ce = Sofa.Core.ObjectFactory.getComponent(component_name)
        templates = sorted(str(t) for t in ce.templates if isinstance(t, str))
        dt = ce.defaultTemplate
        default_template = dt if isinstance(dt, str) and dt else None
        desc = ce.description
        description = desc.strip() if isinstance(desc, str) and desc.strip() else None
        locations = [p for p in ce.locations if isinstance(p, str)]
        return {
            "templates": templates,
            "default_template": default_template,
            "plugin": plugin,
            "description": description,
            "source_header": locations[0] if locations else None,
        }
    except Exception:
        return None


def _is_registered_component(component_name: str) -> Tuple[bool, Optional[str]]:
    """Return `(is_registered, plugin_or_None)`.

    Checks the plugin-map cache first (fast, authoritative for known plugins),
    then falls back to the live ObjectFactory listing. Used to distinguish
    "name is a typo / plugin not loaded" from "name is real but the dummy
    instantiation context isn't sufficient" — see
    `docs/feedback_2026-05-14_query_component_context_bug.md`.
    """
    try:
        from . import plugin_cache
        plugin_map = plugin_cache.load_plugin_map()
        if component_name in plugin_map:
            return True, plugin_map[component_name]
    except Exception:
        pass
    try:
        live = _try_get_registered_component_names()
        if component_name in live:
            return True, None
    except Exception:
        pass
    return False, None


def _maybe_auto_import_component_plugins(core: Any) -> None:
    """Best-effort: import a minimal set of component libraries to populate the registry.

    This is only attempted in real SOFA environments (not mocked tests) and is
    idempotent.
    """

    global _AUTO_IMPORTED_PLUGINS
    if _AUTO_IMPORTED_PLUGINS:
        return

    # Avoid side effects when Sofa.Core is mocked (e.g., unittest MagicMock).
    if not isinstance(core, types.ModuleType):
        _AUTO_IMPORTED_PLUGINS = True
        return

    # --- Start of new cache generation logic ---
    from . import plugin_cache
    if not os.path.exists(plugin_cache.get_cache_path()):
        try:
            plugin_cache.generate_and_save_plugin_map()
        except Exception:
            # If cache generation fails, we can continue without it.
            pass
    # --- End of new cache generation logic ---

    try:
        import SofaRuntime  # type: ignore
    except Exception:
        _AUTO_IMPORTED_PLUGINS = True
        return

    def discover_plugins_from_sofa_root() -> List[str]:
        sofa_root = os.environ.get("SOFA_ROOT")
        if not sofa_root:
            return []

        lib_dirs = [os.path.join(sofa_root, "lib"), os.path.join(sofa_root, "build", "lib")]
        plugins: set[str] = set()
        for lib_dir in lib_dirs:
            if not os.path.isdir(lib_dir):
                continue
            try:
                for filename in os.listdir(lib_dir):
                    # Prefer unversioned .so files; those map cleanly to importPlugin names.
                    if not (filename.startswith("lib") and filename.endswith(".so")):
                        continue
                    plugins.add(filename[len("lib") : -len(".so")])
            except Exception:
                continue

        return sorted(plugins)

    discovered = discover_plugins_from_sofa_root()

    # Import all available Sofa.Component.* modules (and the umbrella module, if present)
    # so component search can cover the full build rather than a tiny default registry.
    plugin_names: List[str] = []
    if "Sofa.Component" in discovered:
        plugin_names.append("Sofa.Component")

    plugin_names.extend([p for p in discovered if p.startswith("Sofa.Component.")])

    # Allow user to force-add plugins via env var (comma-separated names).
    extra = os.environ.get("SOFA_MCP_AUTOIMPORT_PLUGINS", "").strip()
    if extra:
        plugin_names.extend([p.strip() for p in extra.split(",") if p.strip()])

    # De-dupe while preserving order.
    seen: set[str] = set()
    ordered_plugins: List[str] = []
    for p in plugin_names:
        if p in seen:
            continue
        seen.add(p)
        ordered_plugins.append(p)

    for plugin_name in ordered_plugins:
        try:
            SofaRuntime.importPlugin(plugin_name)
        except Exception:
            pass

    _AUTO_IMPORTED_PLUGINS = True


def query_sofa_component(
    component_name: str,
    template: str = None,
    context_components: list[dict] = None,
    include_universal: bool = False,
) -> dict:
    """
    Queries the SOFA component registry for a component and returns its data
    fields, default values, Python bindings, and factory metadata (templates,
    plugin, source header).

    Args:
        component_name: Name of the SOFA component class.
        template: Optional template (e.g. 'Vec3d', 'Rigid3d'). The introspection
            scaffold is built to match, so per-template Data shapes are correct.
        context_components: Optional list of components to add to the context node
            before creating the target. Each dict has a 'type' key + data fields.
        include_universal: Include the 6 universal BaseObject Data fields
            (name, printLog, tags, bbox, componentState, listening). Default False.
    """
    try:
        import SofaRuntime

        base_plugins = [
            "Sofa.Component.StateContainer",
            "Sofa.Component.Topology.Container.Constant",
            "Sofa.Component.Topology.Container.Dynamic",
            "Sofa.Component.Visual",
            "Sofa.GL.Component.Rendering3D",
        ]
        for p in base_plugins:
            try:
                SofaRuntime.importPlugin(p)
            except Exception:
                pass

        # Factory metadata also loads the registering plugin, which helps the
        # instantiation below succeed and populates ClassEntry.templates.
        metadata = _get_class_entry_metadata(component_name)

        root = Sofa.Core.Node("registryQueryNode")

        if context_components:
            for comp in context_components:
                c_type = comp.get("type")
                if not c_type:
                    continue
                kwargs = {k: v for k, v in comp.items() if k != "type"}
                try:
                    root.addObject(c_type, **kwargs)
                except Exception as e:
                    p_match = re.search(r"<RequiredPlugin name=[\"']([^\"']+)[\"']/>", str(e))
                    if p_match:
                        try:
                            SofaRuntime.importPlugin(p_match.group(1))
                            root.addObject(c_type, **kwargs)
                        except Exception:
                            pass
        else:
            effective = template or (metadata.get("default_template") if metadata else None)
            _build_scaffold(root, effective)

        child = root.addChild("targetNode")

        def try_create(node, name, tmpl=None):
            try:
                if tmpl:
                    return node.addObject(name, template=tmpl)
                return node.addObject(name)
            except Exception as e:
                return e

        res = try_create(child, component_name, tmpl=template)

        # Diagnose failure and attempt specific repairs.
        if res is None or isinstance(res, Exception):
            err_msg = str(res) if res is not None else f"addObject('{component_name}') returned None"
            plugin_match = re.search(r"<RequiredPlugin name='([^']+)'/>", err_msg)
            if plugin_match:
                try:
                    SofaRuntime.importPlugin(plugin_match.group(1))
                    res = try_create(child, component_name, tmpl=template)
                except Exception:
                    pass
            if res is None or isinstance(res, Exception):
                err_text = str(res) if res is not None else ""
                if ("template" in err_text.lower() or "mstate" in err_text.lower()
                        or "topology" in err_text.lower() or res is None):
                    if not template:
                        res = try_create(child, component_name, tmpl="Vec3d")

        # Still failing: registered → metadata-only success; else → unknown error.
        if res is None or isinstance(res, Exception):
            error_text = str(res) if res is not None else "Unknown error (addObject returned None)"
            is_registered, plugin = _is_registered_component(component_name)

            if is_registered:
                resp: Dict[str, Any] = {
                    "class_name": component_name,
                    "template": None,  # nothing was instantiated; keep schema uniform with the full path
                    "data_fields": None,
                    "links": None,
                    "introspection": "metadata_only",
                    "note": (
                        f"{component_name} is registered but could not be instantiated in the "
                        "introspection scaffold, so its Data fields are unknown. The class exists "
                        "and the listed templates are valid. For field-level schema, write a "
                        "candidate scene and run write_and_test_scene."
                    ),
                    "success": True,
                }
                if metadata:
                    for k in ("templates", "default_template", "plugin", "description", "source_header"):
                        resp[k] = metadata[k]
                else:
                    resp["plugin"] = plugin
                return resp

            # Truly unknown — keep the existing error contract.
            replacements = _parse_replacements_from_error(error_text)
            renames_map = _load_renames()
            if not replacements and component_name in renames_map:
                replacements = list(renames_map[component_name])

            hints: List[str] = []
            if "mstate" in error_text.lower():
                hints.append("This component requires a MechanicalObject (mstate) in its context.")
            if "topology" in error_text.lower():
                hints.append("This component requires a TopologyContainer (e.g. TetrahedronSetTopologyContainer).")
            if "factory" in error_text.lower() and "plugin" not in error_text.lower():
                hints.append("The component name might be misspelled or the plugin is not loaded.")
            if replacements:
                hints.append(f"SOFA suggests replacements for `{component_name}`: {', '.join(replacements)}.")

            response: Dict[str, Any] = {
                "error": f"Could not create an instance of {component_name} for inspection.",
                "details": error_text,
                "hints": hints,
                "success": False,
            }
            if replacements:
                response["suggested_replacements"] = replacements
            return response

        # Success.
        component = res
        data_fields = {}
        for data in component.getDataFields():
            fname = data.getName()
            if not include_universal and fname in _UNIVERSAL_DATA_FIELDS:
                continue
            data_fields[fname] = {
                "type": data.getValueTypeString(),
                "value": str(data.getValue()),
                "help": str(data.getHelp()),
            }

        links = []
        for link in component.getLinks():
            is_multi = False
            if hasattr(link, "isMultiLink"):
                prop = getattr(link, "isMultiLink")
                is_multi = prop() if callable(prop) else bool(prop)
            links.append({"name": link.getName(), "help": str(link.getHelp()), "is_multi": is_multi})

        actual_template = None
        try:
            tn = component.getTemplateName()
            actual_template = tn if isinstance(tn, str) else None
        except Exception:
            actual_template = None

        response = {
            "name": component.getName(),
            "class_name": component.getClassName(),
            "template": actual_template or (str(template) if template else None),
            "data_fields": data_fields,
            "links": links,
            "introspection": "full",
            "success": True,
        }
        if metadata:
            for k in ("templates", "default_template", "plugin", "description", "source_header"):
                response[k] = metadata[k]
        return response

    except ImportError:
        return {"error": "Sofa.Core not found. Make sure your environment is sourced correctly."}
    except Exception as e:
        return {"error": f"An error occurred: {e}"}


def _factory_query_for_rename(component_name: str) -> Optional[str]:
    """Ask the live ObjectFactory to construct `component_name`; return the
    error text (which often contains a "has been replaced since vX.Y by ..."
    block for retired components) or None on success/unavailable factory."""
    try:
        node = Sofa.Core.Node("renameProbe")
        node.addObject(component_name)
        return None
    except Exception as e:
        return str(e)


def get_plugin_for_component(component_name: str, context_components: list[dict] = None):
    """
    Finds the required SOFA plugin for a single component name using the generated cache.

    Returns:
        - `str` plugin name when the component is in the cache (back-compat
          shape for existing callers).
        - `dict` with `hint` / `suggested_replacements` / `renamed: True` when
          the component is *not* in the cache but SOFA's factory or the local
          `renames.json` map identifies it as a retired class. This eliminates
          the round-trip where the agent had to run `write_and_test_scene`
          just to discover a rename.
        - `str` "Component not found in cache" when truly unknown.
    """
    try:
        from . import plugin_cache

        # 1. Ensure the cache is built.
        cache_path = plugin_cache.get_cache_path()
        if not os.path.exists(cache_path):
            plugin_cache.generate_and_save_plugin_map()

        # 2. Load the map and perform the lookup. This is the single source of truth.
        plugin_map = plugin_cache.load_plugin_map()

        if component_name in plugin_map:
            # Check if the plugin is already loaded in the current context.
            # This is a bit of a heuristic. We try to add a dummy component from the plugin.
            # If it succeeds without error, we can say "Already Loaded".
            try:
                import SofaRuntime
                plugin_name = plugin_map[component_name]
                SofaRuntime.importPlugin(plugin_name)
                return plugin_name
            except Exception:
                 # If import fails, we return the name from cache.
                 return plugin_map[component_name]

        # Not in the cache → try the factory and the local renames map.
        # SOFA's own error message is the gold source for rename hints
        # ("X has been replaced since v25.12 by - Y - Z - W").
        renames_map = _load_renames()
        replacements: List[str] = []
        factory_error = _factory_query_for_rename(component_name)
        if factory_error:
            replacements = _parse_replacements_from_error(factory_error)
        if not replacements and component_name in renames_map:
            replacements = list(renames_map[component_name])

        if replacements:
            return {
                "plugin": None,
                "renamed": True,
                "hint": (
                    f"`{component_name}` is retired. SOFA / local map suggests: "
                    f"{', '.join(replacements)}."
                ),
                "suggested_replacements": replacements,
            }

        return "Component not found in cache"

    except Exception as e:
        return f"Error during plugin query: {e}"


def get_plugins_for_components(component_names: list[str], context_components: list[dict] = None) -> Dict[str, Any]:
    """
    For a list of SOFA component names, returns a mapping to their required plugins.

    Each value is either a plugin-name `str` (found in cache) or a dict with
    rename information (see `get_plugin_for_component`).
    """
    results: Dict[str, Any] = {}
    # De-duplicate to avoid redundant checks
    for name in sorted(list(set(component_names))):
        results[name] = get_plugin_for_component(name, context_components=context_components)

    return results


def _try_get_registered_component_names() -> List[str]:

    """Best-effort retrieval of registered SOFA component class names.

    SOFA Python bindings vary between builds; this probes a few common APIs.
    """

    core = getattr(Sofa, "Core", None)
    if core is None:
        return []

    # Attempt ObjectFactory-based discovery.
    factory_class = getattr(core, "ObjectFactory", None)
    if factory_class is not None:
        try:
            instance = factory_utils.get_object_factory_instance()
            names = factory_utils.collect_component_names_from_factory(instance)
            if len(names) >= _MIN_COMPONENT_REGISTRY_SIZE:
                return names

            # Some builds only have a tiny default registry until component
            # libraries are explicitly imported. Try a best-effort import and retry.
            _maybe_auto_import_component_plugins(core)
            refreshed = factory_utils.collect_component_names_from_factory(instance)
            if len(refreshed) >= _MIN_COMPONENT_REGISTRY_SIZE:
                return refreshed
            if refreshed:
                return refreshed
        except Exception:
            pass

    # Attempt runtime-based discovery if present.
    runtime = getattr(Sofa, "Runtime", None)
    if runtime is not None:
        try:
            for method_name in ("getComponents", "getComponentList", "getAvailableComponents"):
                if hasattr(runtime, method_name):
                    names = getattr(runtime, method_name)()
                    if names:
                        return [str(n) for n in names]
        except Exception:
            pass

    return []


def search_sofa_components(query: str, limit: int = 50) -> Dict[str, Any]:
    """Searches SOFA's registered components by a fuzzy query using the generated cache."""

    try:
        from . import plugin_cache
        names = list(plugin_cache.load_plugin_map().keys())

        if not names:
            # Fallback to the old method if the cache is empty for some reason
            names = _try_get_registered_component_names()

        if not names:
            return {
                "error": "Component search is not available. The plugin cache might be empty and the live factory is not responsive.",
            }

        raw_query = (query or "").strip()
        if not raw_query:
            return {
                "error": "query must be a non-empty string",
            }

        prefix_mode = raw_query.endswith("*")
        q = raw_query[:-1] if prefix_mode else raw_query
        q = q.strip().lower()

        # Tokenize on non-alphanumeric boundaries to support queries like
        # "tet topology" or "rigid3".
        tokens = [t for t in re.split(r"[^a-zA-Z0-9]+", q) if t]
        if not tokens:
            return {
                "error": "query must contain at least one alphanumeric character",
            }

        def match(name: str) -> bool:
            n = name.lower()
            if prefix_mode:
                return any(n.startswith(t) for t in tokens) if len(tokens) == 1 else all(t in n for t in tokens)
            return all(t in n for t in tokens)

        deduped = sorted({str(n) for n in names})
        matches = [n for n in deduped if match(n)]

        # Fold renamed-class results in: if any retired name matches the query
        # tokens, prepend its modern replacements (with a `replaces` annotation)
        # to the head of the results. Substring search alone can't bridge a
        # rename like `GenericConstraintSolver` → `BlockGaussSeidel...`.
        renames_map = _load_renames()
        renamed_prefix: List[Dict[str, str]] = []
        for retired, replacements in renames_map.items():
            if match(retired):
                for repl in replacements:
                    renamed_prefix.append({"name": repl, "replaces": retired})

        capped = matches[: int(limit)]
        result: Dict[str, Any] = {
            "query": raw_query,
            "limit": int(limit),
            "count": len(capped),
            "matches": capped,
        }
        if renamed_prefix:
            result["renamed_replacements"] = renamed_prefix
        return result

    except ImportError:
        return {"error": "Sofa.Core not found. Make sure your environment is sourced correctly."}
    except Exception as e:
        return {"error": f"An error occurred: {e}"}
